// COMSOL Multiphysics 6.2.0.290 model "eitsensorBeatriz.mph"
// Outline of the model tree

Parameters
  layer_count = 1  // Number of Velostat layers (1, 2, or 3)
  R_cyl = 25[mm]  // Cylinder radius
  H_cyl = 120[mm]  // Cylinder height
  t_v_total = 200[um]  // Total Velostat thickness to study (used to derive per-layer thickness)
  t_v1 = if(layer_count>=1, t_v_total/layer_count, 0)  // Velostat layer 1 thickness
  t_v2 = if(layer_count>=2, t_v_total/layer_count, 0)  // Velostat layer 2 thickness
  t_v3 = if(layer_count>=3, t_v_total/layer_count, 0)  // Velostat layer 3 thickness
  air_gap = 50[um]  // Optional air gap between layers (0 to disable)
  sigma0 = 0.001[S/m]  // Baseline Velostat conductivity (pre-load)
  alpha = 0.1  // Conductivity gain factor under pressure
  p0 = 1[kPa]  // Pressure scaling parameter in σ = σ0*(1+alpha*log(1+p/p0))
  touch_d = 10[mm]  // Touch/contact diameter on surface (use sweep 6,10,14 mm)
  touch_p = 10[kPa]  // Applied pressure level (use sweep 3,10,25 kPa)
  theta0 = 0[deg]  // Touch angular position (sweep e.g. range(0[deg],22.5[deg],337.5[deg]))
  z_touch = H_cyl/2  // Touch axial position (at mid-height)
  Ne_ring = 16  // Number of electrodes per ring (use 16 or 32)
  Nrings = 1  // Number of electrode rings (1 or 2)
  ring_gap = 12[mm]  // Axial spacing between two rings (if Nrings=2)
  we_arc = 8[mm]  // Electrode arc length (approx. linear width along circumference)
  he_ax = 10[mm]  // Electrode axial height
  elec_thk = 0.2[mm]  // Electrode thickness (for geometry if modeled)
  Iinj = 5[mA]  // Injected current amplitude for drive pair
  freq = 1000[Hz]  // Drive frequency (use low-freq AC for EC physics)
  zc = 50[ohm*cm^2]  // Contact impedance (sweep 0,50,150 ohm·cm²)
  jitter_ang = 1.5[deg]  // Std dev of angular electrode misplacement (Monte Carlo/scripts)
  jitter_ax = 0.5[mm]  // Std dev of axial electrode misplacement (Monte Carlo/scripts)
  sigma_touch_scale = 1  // Layered touch anisotropy factor for layer 1 (1 = same as baseline model)
  sigma_touch_scale2 = 1  // Anisotropy factor for layer 2 (set ≠1 to emulate orthogonal ply response)
  SNR_dB = 30  // dB
  circumference = 2*pi*R_cyl  // Cylinder circumference
  elec_pitch_arc = circumference/Ne_ring  // Arc pitch between adjacent electrodes
  elec_fill = we_arc/elec_pitch_arc  // Azimuthal fill factor (0–1)
  ring_z1 = H_cyl/2  // Axial position of ring 1 (centered)
  ring_z2 = H_cyl/2 + if(Nrings==2, ring_gap, 0)  // Axial position of ring 2 (if present)
  tv_eff = t_v1 + t_v2 + t_v3 + if(layer_count>1, air_gap*(layer_count-1), 0)  // Effective stack thickness incl. gaps

Selections
  sel1: Explicit "E1" on boundaries 4, 5 | angletol = 0.0872664625997
  sel2: Explicit "E2" on boundaries 26 | angletol = 0.0872664625997
  sel3: Explicit "E3" on boundaries 44 | angletol = 0.0872664625997
  sel4: Explicit "E4" on boundaries 62 | angletol = 0.0872664625997
  sel5: Explicit "E5" on boundaries 79, 88 | angletol = 0.0872664625997
  sel6: Explicit "E6" on boundaries 108 | angletol = 0.0872664625997
  sel7: Explicit "E7" on boundaries 126 | angletol = 0.0872664625997
  sel8: Explicit "E8" on boundaries 144 | angletol = 0.0872664625997
  sel9: Explicit "E9" on no boundaries | angletol = 0.0872664625997
  sel10: Explicit "E10" on boundaries 148 | angletol = 0.0872664625997
  sel11: Explicit "E11" on boundaries 130 | angletol = 0.0872664625997
  sel12: Explicit "E12" on boundaries 112 | angletol = 0.0872664625997
  sel13: Explicit "E13" on boundaries 84, 97 | angletol = 0.0872664625997
  sel14: Explicit "E14" on boundaries 66 | angletol = 0.0872664625997
  sel15: Explicit "E15" on boundaries 48 | angletol = 0.0872664625997
  sel16: Explicit "E16" on boundaries 30 | angletol = 0.0872664625997

Geometry
  geom1 "geometry" (3D, length unit mm)
    cyl1: Cylinder "v_in_outer" | r = R_cyl+t_v1; h = H_cyl
    cyl2: Cylinder "v_in_inner" | r = R_cyl; h = H_cyl
    dif1: Difference "VEL_PLY_A" | input = cyl1; input2 = cyl2
    wp1: WorkPlane "PlaneTop" | quickz = ring_z1 + he_ax/2; unite = on
    wp2: WorkPlane "PlaneBot" | quickz = ring_z1 - he_ax/2; unite = on
    blk1: Block "BeltCutter" | pos = {0, 0, ring_z1 - he_ax/2}; base = center; size = {2*R_cyl, 2*R_cyl, he_ax}
    par1: Partition "Partition Objects 1" | input = dif1; tool = blk1; workplane = wp2
    blk2: Block "CutBlock1"
      pos = {0, 0, ring_z1 - he_ax/2}
      type = surface
      base = center
      size = {2*R_cyl, 2*R_cyl, he_ax}
    rot1: Rotate | input = blk2; pos = {0, 0, 1}; rot = range(0,0.392699081699,5.89048622548)
    par2: Partition "Partition Objects 2" | input = par1; keepinput = on; tool = selection rot1; workplane = wp2
    fin: Finalize "Form Union"

Materials
  mat1: Common "velostat" on domains 1, 3
    def "Basic"
      electricconductivity = sigma0
  velostat_pressed: Common on domains 3
    def "Basic"
      electricconductivity = sigma0*(1+alpha*log(1+touch_p/p0))

Physics
  ec: ConductiveMedia "Electric Currents" on domains 1-34
    dependent variable V
    cucn1: CurrentConservation (default)
    ein1: ElectricInsulation (default)
    init1: init "Initial Values 1" (default)
    term1: DomainTerminal "Terminal 1" on domains 10 | TerminalType = Voltage

Mesh
  mesh1 "Mesh 1" (physics-controlled)

Studies
  std1 "Study 1"
    freq: Frequency "Frequency Domain"